# OpenSim document version 30000
InverseKinematicsTool:
  results_directory: ./
  constraint_weight: Inf
  accuracy: 1e-8
  report_errors: true
  report_marker_locations: true
  IKTaskSet:
    IKMarkerTask LASI: apply=true weight=100
    IKMarkerTask RASI: apply=true weight=100
    IKMarkerTask LPSI: apply=true weight=100
    IKMarkerTask RPSI: apply=true weight=100
    IKMarkerTask RTHI: apply=true weight=100
    IKMarkerTask RKNE: apply=true weight=100
    IKMarkerTask RTIB: apply=true weight=100
    IKMarkerTask RANK: apply=true weight=100
    IKMarkerTask RHEE: apply=true weight=100
    IKMarkerTask RTOE: apply=true weight=100
    IKMarkerTask LTHI: apply=true weight=100
    IKMarkerTask LKNE: apply=true weight=100
    IKMarkerTask LTIB: apply=true weight=100
    IKMarkerTask LANK: apply=true weight=100
    IKMarkerTask LHEE: apply=true weight=100
    IKMarkerTask LTOE: apply=true weight=100
