# OpenSim document version 30000
MarkerSet:
  Marker LASI: pelvis (0.0080898 0.0101666 -0.124647)
  Marker RASI: pelvis (-0.00597153 0.00359413 0.127307)
  Marker LPSI: pelvis (-0.183608 0.0634621 -0.0680169)
  Marker RPSI: pelvis (-0.180909 0.0634337 0.0546326)
  Marker LTHI: femur_l (-0.00399242 -0.20754 -0.0999247)
  Marker LKNE: femur_l (0 -0.415174 -0.0525)
  Marker RTHI: femur_r (0.002865 -0.233089 0.128454)
  Marker RKNE: femur_r (3.72529e-9 -0.402651 0.0527368)
  Marker LTIB: tibia_l (-0.0208461 -0.192153 -0.10025)
  Marker LANK: tibia_l (0 -0.424826 -0.04)
  Marker RTIB: tibia_r (-1.77636e-17 -0.206151 0.0710892)
  Marker RANK: tibia_r (-0.00969172 -0.418783 0.0429379)
  Marker RHEE: calcn_r (-0.0645362 -0.0271254 -0.0145158)
  Marker RSMH: toes_r (0.0817053 0.00652635 0.00423662)
  Marker LHEE: calcn_l (-0.0645362 -0.0271254 -0.0145158)
  Marker LSMH: toes_l (0.0817053 0.00652635 0.00423662)
  Marker LTHAP: femur_l (0.0510168 -0.135932 -0.0206733)
  Marker LTHAD: femur_l (0.0575402 -0.282133 -0.012113)
  Marker LTIAP: tibia_l (0.0468274 -0.161181 -0.0112459)
  Marker LTIAD: tibia_l (0.0356325 -0.307753 0.0153233)
  Marker RTHAP: femur_r (0.0510168 -0.135932 -0.0206733)
  Marker RTHAD: femur_r (0.0575402 -0.282133 -0.012113)
  Marker RTIAP: tibia_r (0.0468274 -0.161181 -0.0112459)
  Marker RTIAD: tibia_r (0.0626192 -0.302782 0.0125915)
  Marker LTHLD: femur_l (0.012637 -0.287289 -0.0550111)
  Marker LPAT: femur_l (0.0499838 -0.392918 0.000312091)
  Marker RTHLD: femur_r (0.0190351 -0.287393 0.0469096)
  Marker RPAT: femur_r (0.0422081 -0.39479 0.00836546)
  Marker RTOE: calcn_r (0.0817053 0.00652635 0.00423662)
  Marker RFMH: toes_r (0.00465547 0.00432085 -0.0457093)
  Marker RVMH: toes_r (-0.006375 -0.00323313 0.0657584)
  Marker LTOE: calcn_l (0.0817053 0.00652635 0.00423662)
  Marker LFMH: toes_l (-0.00492577 0.00216376 0.0470056)
  Marker LVMH: toes_l (-0.016706 0.00973708 -0.0569778)
